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/batch
! ANSYS input file written by Workbench version 19.0 RELEASE
! File used for geometry attach: D:\Documents\2nd degree\Geometry_Analysis\Scaffolds\Cylindical_Pores_Scaffold\Cylindrical_Pores_Scaffo;d_Mesh_files\dp0\SYS\DM\SYS.agdb
/title,Cylindrical_Pores_Scaffo;d_Mesh--Static Structural
/com,--- Data in consistent MKS units. See Solving Units in the help system for more information.
/units,MKS
/prep7
! Turn off shape checking because checks already performed inside WB mesher.
! See help system for more information.
SHPP,OFF,,NOWARN
etcon,set             ! allow ANSYS to choose best KEYOP's for 180x elements
/com,*********** Nodes for the whole assembly ***********
nblock,3,,2120
(1i9,3e20.9e3)
        1   -2.121320344E-003    0.000000000E+000   -2.121320344E-003
        2   -2.353246995E-003    0.000000000E+000   -1.860706474E-003
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-1
/com,*********** Elements for Body 1 "Cylindical_Pores_Scaffold_Unit" ***********
et,1,200
keyo,1,1,6
eblock,19,solid,,3540
(19i9)
        1        1        1        1        0        0        0        0        4        0        1      346      347     1081     1081
        1        1        1        1        0        0        0        0        4        0        2      344      345     1080     1080
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-1
/com,*********** Send User Defined Coordinate System(s) ***********
csys,0
/com,*********** Send Materials ***********

/com,*********** Send Sheet Properties ***********
